*HEADING
cubit(/Users/JBR/libs_src/Dealii/JBR/Mesh_Files/pad_mesh_3.inp): 06/27/2016: 17:
version: 15.1
**
********************************** P A R T S **********************************
*PART, NAME=Part-Default
**
********************************** N O D E S **********************************
*NODE, NSET=ALLNODES
       1,    2.087500e+00,    1.312500e+00,    1.215167e+00
       2,    2.025000e+00,    1.312500e+00,    1.215167e+00
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**
********************************** E L E M E N T S ****************************
*ELEMENT, TYPE=C3D8R, ELSET=EB1
       1,       1,       2,       3,       4,       5,       6,       7,       8
       2,       4,       3,       9,      10,       8,       7,      11,      12
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*ELEMENT, TYPE=C3D8R, ELSET=EB2
    4246,    1218,    6133,    6134,    1220,    1216,    6135,    6136,    2726
    4247,    6133,    6137,    6138,    6134,    6135,    6139,    6140,    6136
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*ELEMENT, TYPE=C3D8R, ELSET=EB3
    4686,    6709,    6710,    6711,    6712,    6713,    6714,    6715,    6716
    4687,    6717,    6709,    6712,    6718,    6719,    6713,    6716,    6720
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*ELEMENT, TYPE=C3D8R, ELSET=EB4
    7703,   10197,   10198,   10199,   10200,     104,     103,     102,     101
    7704,   10201,   10202,   10198,   10197,     108,     107,     103,     104
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**
********************************** S I D E S E T S **********************************
*ELSET, ELSET=SS1_S3
     401,     410,     430,     431,     965,     974
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*ELSET, ELSET=SS1_S4
      48,      58,     369,     380,     399,     434
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*ELSET, ELSET=SS1_S5
      37,      41,      42,      49,     601,     605
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*ELSET, ELSET=SS1_S6
     327,     433,     482,     891,     997,    1046,    1455,    1561,    1610
*SURFACE, NAME=SS1
SS1_S3, S3
SS1_S4, S4
SS1_S5, S5
SS1_S6, S6
*ELSET, ELSET=SS2_S5
    5650
*SURFACE, NAME=SS2
SS2_S5, S5
**
********************************** P R O P E R T I E S ************************
*SOLID SECTION, ELSET=EB1, MATERIAL=Default-Steel
*SOLID SECTION, ELSET=EB2, MATERIAL=Default-Steel
*SOLID SECTION, ELSET=EB3, MATERIAL=Default-Steel
*SOLID SECTION, ELSET=EB4, MATERIAL=Default-Steel
**
*END PART
**
**
**
********************************** E N D   P A R T S **********************************
**
**
********************************** A S S E M B L Y ************************************
**
*ASSEMBLY, NAME=ASSEMBLY1
**
*INSTANCE, NAME=Part-Default_1, PART=Part-Default
*END INSTANCE
**
*END ASSEMBLY
**
**
**
*MATERIAL, NAME = DEFAULT-STEEL
*ELASTIC, TYPE=ISOTROPIC
2.068000e+05, 2.900000e-01
*DENSITY
7.000000e-06
*CONDUCTIVITY,TYPE=ISO
4.500000e-02
*SPECIFIC HEAT
5.000000e+02
**
*MATERIAL, NAME = DEFAULT-STEEL2
*ELASTIC, TYPE=ISOTROPIC
2.068000e+05, 2.900000e-01
*DENSITY
7.000000e-06
*CONDUCTIVITY,TYPE=ISO
4.500000e-02
*SPECIFIC HEAT
5.000000e+02
**
*MATERIAL, NAME = Default-Steel
*ELASTIC, TYPE=ISOTROPIC
2.068000e+05, 2.900000e-01
*DENSITY
7.000000e-06
*CONDUCTIVITY,TYPE=ISO
4.500000e-02
*SPECIFIC HEAT
5.000000e+02
**
**
************************************** H I S T O R Y *************************************
**
*PREPRINT
**
**************************************** S T E P 1 ***************************************
*STEP,INC=100,NAME=DEFAULT SET
**
*STATIC
1, 1, 1e-05, 1
**
**
**
**
*END STEP
